// COMSOL Multiphysics 5.5.0.292 model "Base.mph"
// Outline of the model tree

Parameters
  resolution = 2[um]  // Post processing resolution on sample
  eta = 0.95  // Capacitance ratio
  mesh_size = 0.25  // Mesh base size
  w = 25[um]  // Electrode width
  d = 10[um]  // Electrode distance from sample
  d_shield = 10[um]  // Shielding electrode distance from sample
  R = 199.7498[um]  // Maximum sample size based on point charge field

Geometry
  geom1 "Geometry 1" (3D, length unit µm)
    wp1: WorkPlane "Sample"
      sq1: Square | size = 0.75*w
      sq2: Square | size = 2.5*w
      sq3: Square | size = w+R
      fil1: Fillet | point = sq3(1) points 3; radius = w+R
      ca1: CircularArc | r = 5*w*exp(0); point1 = {125, 0}; point2 = {7.65404249467e-15, 125}
      ca2: CircularArc | r = 5*w*exp(0.25); point1 = {160.503177086, 0}; point2 = {9.82798510357e-15, 160.503177086}
      pard1: PartitionDomains
        domain = fil1(1) domains 1
        partitionwith = edges
        edge = sq1(1) boundaries 2, 3; sq2(1) boundaries 2, 3; ca1(1) boundaries 1; ca2(1) boundaries 1
    wp2: WorkPlane "Electrode" | quickz = d
      sq1: Square | size = w/2
    wp3: WorkPlane "Shield" | quickz = d_shield
      sq1: Square | size = 2*w
      sq2: Square | size = w
      dif1: Difference | input = sq1; input2 = sq2
    boxsel1: BoxSelection "Sample_surface" | entitydim = 2; xmin = 0; ymin = 0; ymax = inf; zmin = 0; zmax = 0
    boxsel2: BoxSelection "Electrode_surface"
      entitydim = 2
      xmin = 0
      xmax = w/2
      ymin = 0
      ymax = w/2
      zmin = 0.1
      zmax = inf
    boxsel3: BoxSelection "Shield_surface"
      entitydim = 2
      xmin = w
      xmax = 2*w
      ymin = 0
      ymax = w/2
      zmin = 0.1
      zmax = inf
    fin: Finalize "Form Union"

Materials
  mat1: Common "Air" on no domains
    def "Basic"
      relpermittivity = 1

Physics
  esbe: ElectrostaticsBoundaryElements on all domains
    dependent variable V
    ShapeProperty.shapeorder = p21
    Symmetry.sym1 = even
    Symmetry.sym2 = even
    ccn1: ChargeConservation (default)
    zc1: ZeroCharge (default)
    zc2: ZeroChargeEdge "Zero Charge 2" (default)
    init1: init2 "Initial Values 1" (default)
    gnd1: Ground "Sample" on selection geom1_boxsel1
    pot1: ElectricPotential "Electrode" on selection geom1_boxsel2 | V0 = 1[V]
    pot2: ElectricPotential "Shield" on selection geom1_boxsel3 | V0 = 0[V]

Mesh
  mesh1 "Mesh 1"
    size: MeshSizeDefault | hmax = w/10; hmin = w/20; custom = on
    size2: Size on boundaries 3-5 | hmax = w/6; hmin = w/10; custom = on
    size3: Size on boundaries 6
      hmax = w*exp(0*mesh_size)*(1-exp(-mesh_size))
      hmin = 0.5*w*exp(0*mesh_size)*(1-exp(-mesh_size))
      custom = on
    size4: Size on boundaries 7
      hmax = w*exp(1*mesh_size)*(1-exp(-mesh_size))
      hmin = 0.5*w*exp(1*mesh_size)*(1-exp(-mesh_size))
      custom = on
    fq1: FreeQuad on remaining entities

Studies
  std1 "Static capacitances"
    stat: Stationary

Solver configurations
  sol1 "Solution 1" (study std1)
    v1: Variables "Dependent Variables 1"
    s1: Stationary "Stationary Solver 1" | stol = 1e-12
      fcDef: FullyCoupled | linsolver = i1
      i1: Iterative "Iterative Solver" | linsolver = cg; prefuntype = right
        dp1: DirectPreconditioner | linsolver = dense

Datasets
  dset1: Solution | solution = sol1
  grid1: Grid3D | source = data; data = dset1; parmax1 = 2.5*w; parmax2 = 2.5*w; parmax3 = 3*d_shield
  cl1: CutLine3D "Electrode_CutLine" | data = dset1; genpoints = {{0, 0, d}, {w/2, 0, d}}
  cl2: CutLine3D "Sample_CutLine" | data = dset1; genpoints = {{0, 0, 0}, {w+R, 0, 0}}
  cl3: CutLine3D "Shield_CutLine" | data = dset1; genpoints = {{w, 0, d_shield}, {2*w, 0, d_shield}}
  surf1: Surface "Sample surface" on selection geom1_boxsel1 | data = dset1
  surf2: Surface "Shield surface" on selection geom1_boxsel3 | data = dset1
  surf3: Surface "Sensitivity" on boundaries 1 | data = dset1
  cpl1: CutPlane "Electric field CutPlane"
    data = grid1
    planetype = general
    genmethod = pointnormal
    genpnvec = {0, -1, 0}

Evaluation groups
  eg1: EvaluationGroup "Charge distribution high resolution" | data = dset1; transpose = on
    int1: IntSurface "Surface Integration 1" on boundaries 1
      expr = -4*esbe.nD
      unit = fC
      descr = Charge under electrode
    int2: IntSurface "Surface Integration 2" on boundaries 3 | expr = -4*esbe.nD; unit = fC; descr = Charge under shield
    int3: IntSurface "Surface Integration 3" on boundaries 1, 3, 5
      expr = -4*esbe.nD
      unit = fC
      descr = Charge whitin 5w um
    int4: IntSurface "Surface Integration 4" on selection geom1_boxsel1
      expr = -4*esbe.nD*(x^2+y^2<(5*w+1*resolution)^2)
      unit = fC
      descr = Charge within 5w+2 um
    int5: IntSurface "Surface Integration 5" on selection geom1_boxsel1
      expr = -4*esbe.nD*(x^2+y^2<(5*w+2*resolution)^2)
      unit = fC
      descr = Charge within 5w+4 um
    int6: IntSurface "Surface Integration 6" on selection geom1_boxsel1
      expr = -4*esbe.nD*(x^2+y^2<(5*w+3*resolution)^2)
      unit = fC
      descr = Charge within 5w+6 um
    int7: IntSurface "Surface Integration 7" on selection geom1_boxsel1
      expr = -4*esbe.nD*(x^2+y^2<(5*w+4*resolution)^2)
      unit = fC
      descr = Charge within 5w+8 um
    int8: IntSurface "Surface Integration 8" on selection geom1_boxsel1
      expr = -4*esbe.nD*(x^2+y^2<(5*w+5*resolution)^2)
      unit = fC
      descr = Charge within 5w+10 um
    int9: IntSurface "Surface Integration 9" on selection geom1_boxsel1
      expr = -4*esbe.nD*(x^2+y^2<(5*w+6*resolution)^2)
      unit = fC
      descr = Charge within 5w+12 um
    int10: IntSurface "Surface Integration 10" on selection geom1_boxsel1
      expr = -4*esbe.nD*(x^2+y^2<(5*w+7*resolution)^2)
      unit = fC
      descr = Charge within 5w+14 um
    int11: IntSurface "Surface Integration 11" on selection geom1_boxsel1
      expr = -4*esbe.nD*(x^2+y^2<(5*w+8*resolution)^2)
      unit = fC
      descr = Charge within 5w+16 um
    int12: IntSurface "Surface Integration 12" on selection geom1_boxsel1
      expr = -4*esbe.nD*(x^2+y^2<(5*w+9*resolution)^2)
      unit = fC
      descr = Charge within 5w+18 um
    int13: IntSurface "Surface Integration 13" on selection geom1_boxsel1
      expr = -4*esbe.nD*(x^2+y^2<(5*w+10*resolution)^2)
      unit = fC
      descr = Charge within 5w+20 um
    int14: IntSurface "Surface Integration 14" on selection geom1_boxsel1
      expr = -4*esbe.nD*(x^2+y^2<(5*w+11*resolution)^2)
      unit = fC
      descr = Charge within 5w+22 um
    int15: IntSurface "Surface Integration 15" on selection geom1_boxsel1
      expr = -4*esbe.nD*(x^2+y^2<(5*w+12*resolution)^2)
      unit = fC
      descr = Charge within 5w+24 um
    int16: IntSurface "Surface Integration 16" on selection geom1_boxsel1
      expr = -4*esbe.nD*(x^2+y^2<(5*w+13*resolution)^2)
      unit = fC
      descr = Charge within 5w+26 um
    int17: IntSurface "Surface Integration 17" on selection geom1_boxsel1
      expr = -4*esbe.nD*(x^2+y^2<(5*w+14*resolution)^2)
      unit = fC
      descr = Charge within 5w+28 um
    int18: IntSurface "Surface Integration 18" on selection geom1_boxsel1
      expr = -4*esbe.nD*(x^2+y^2<(5*w+15*resolution)^2)
      unit = fC
      descr = Charge within 5w+30 um
    int19: IntSurface "Surface Integration 19" on selection geom1_boxsel1
      expr = -4*esbe.nD*(x^2+y^2<(5*w+16*resolution)^2)
      unit = fC
      descr = Charge within 5w+32 um
    int20: IntSurface "Surface Integration 20" on selection geom1_boxsel1
      expr = -4*esbe.nD*(x^2+y^2<(5*w+17*resolution)^2)
      unit = fC
      descr = Charge within 5w+34 um
    int21: IntSurface "Surface Integration 21" on selection geom1_boxsel1
      expr = -4*esbe.nD*(x^2+y^2<(5*w+18*resolution)^2)
      unit = fC
      descr = Charge within 5w+36 um
    int22: IntSurface "Surface Integration 22" on selection geom1_boxsel1
      expr = -4*esbe.nD*(x^2+y^2<(5*w+19*resolution)^2)
      unit = fC
      descr = Charge within 5w+38 um
    int23: IntSurface "Surface Integration 23" on selection geom1_boxsel1
      expr = -4*esbe.nD*(x^2+y^2<(5*w+20*resolution)^2)
      unit = fC
      descr = Charge within 5w+40 um
    int24: IntSurface "Surface Integration 24" on selection geom1_boxsel1
      expr = -4*esbe.nD*(x^2+y^2<(5*w+21*resolution)^2)
      unit = fC
      descr = Charge within 5w+42 um
    int25: IntSurface "Surface Integration 25" on selection geom1_boxsel1
      expr = -4*esbe.nD*(x^2+y^2<(5*w+22*resolution)^2)
      unit = fC
      descr = Charge within 5w+44 um
    int26: IntSurface "Surface Integration 26" on selection geom1_boxsel1
      expr = -4*esbe.nD*(x^2+y^2<(5*w+23*resolution)^2)
      unit = fC
      descr = Charge within 5w+46 um
    int27: IntSurface "Surface Integration 27" on selection geom1_boxsel1
      expr = -4*esbe.nD*(x^2+y^2<(5*w+24*resolution)^2)
      unit = fC
      descr = Charge within 5w+48 um
    int28: IntSurface "Surface Integration 28" on selection geom1_boxsel1
      expr = -4*esbe.nD*(x^2+y^2<(5*w+25*resolution)^2)
      unit = fC
      descr = Charge within 5w+50 um
    int29: IntSurface "Surface Integration 29" on selection geom1_boxsel1
      expr = -4*esbe.nD*(x^2+y^2<(5*w+26*resolution)^2)
      unit = fC
      descr = Charge within 5w+52 um
    int30: IntSurface "Surface Integration 30" on selection geom1_boxsel1
      expr = -4*esbe.nD*(x^2+y^2<(5*w+27*resolution)^2)
      unit = fC
      descr = Charge within 5w+54 um
    int31: IntSurface "Surface Integration 31" on selection geom1_boxsel1
      expr = -4*esbe.nD*(x^2+y^2<(5*w+28*resolution)^2)
      unit = fC
      descr = Charge within 5w+56 um
    int32: IntSurface "Surface Integration 32" on selection geom1_boxsel1
      expr = -4*esbe.nD*(x^2+y^2<(5*w+29*resolution)^2)
      unit = fC
      descr = Charge within 5w+58 um
    int33: IntSurface "Surface Integration 33" on selection geom1_boxsel1
      expr = -4*esbe.nD*(x^2+y^2<(5*w+30*resolution)^2)
      unit = fC
      descr = Charge within 5w+60 um
    int34: IntSurface "Surface Integration 34" on selection geom1_boxsel1
      expr = -4*esbe.nD*(x^2+y^2<(5*w+31*resolution)^2)
      unit = fC
      descr = Charge within 5w+62 um
    int35: IntSurface "Surface Integration 35" on selection geom1_boxsel1
      expr = -4*esbe.nD*(x^2+y^2<(5*w+32*resolution)^2)
      unit = fC
      descr = Charge within 5w+64 um
    int36: IntSurface "Surface Integration 36" on selection geom1_boxsel1
      expr = -4*esbe.nD*(x^2+y^2<(5*w+33*resolution)^2)
      unit = fC
      descr = Charge within 5w+66 um
    int37: IntSurface "Surface Integration 37" on selection geom1_boxsel1
      expr = -4*esbe.nD*(x^2+y^2<(5*w+34*resolution)^2)
      unit = fC
      descr = Charge within 5w+68 um
    int38: IntSurface "Surface Integration 38" on selection geom1_boxsel1
      expr = -4*esbe.nD*(x^2+y^2<(5*w+35*resolution)^2)
      unit = fC
      descr = Charge within 5w+70 um
    int39: IntSurface "Surface Integration 39" on selection geom1_boxsel1
      expr = -4*esbe.nD*(x^2+y^2<(5*w+36*resolution)^2)
      unit = fC
      descr = Charge within 5w+72 um
    int40: IntSurface "Surface Integration 40" on selection geom1_boxsel1
      expr = -4*esbe.nD*(x^2+y^2<(5*w+37*resolution)^2)
      unit = fC
      descr = Charge within 5w+74 um
    int41: IntSurface "Surface Integration 41" on selection geom1_boxsel1
      expr = -4*esbe.nD*(x^2+y^2<(5*w+38*resolution)^2)
      unit = fC
      descr = Charge within 5w+76 um
    int42: IntSurface "Surface Integration 42" on selection geom1_boxsel1
      expr = -4*esbe.nD*(x^2+y^2<(5*w+39*resolution)^2)
      unit = fC
      descr = Charge within 5w+78 um
    int43: IntSurface "Surface Integration 43" on selection geom1_boxsel1
      expr = -4*esbe.nD*(x^2+y^2<(5*w+40*resolution)^2)
      unit = fC
      descr = Charge within 5w+80 um
    int44: IntSurface "Surface Integration 44" on selection geom1_boxsel1
      expr = -4*esbe.nD*(x^2+y^2<(5*w+41*resolution)^2)
      unit = fC
      descr = Charge within 5w+82 um
    int45: IntSurface "Surface Integration 45" on selection geom1_boxsel1
      expr = -4*esbe.nD*(x^2+y^2<(5*w+42*resolution)^2)
      unit = fC
      descr = Charge within 5w+84 um
    int46: IntSurface "Surface Integration 46" on selection geom1_boxsel1
      expr = -4*esbe.nD*(x^2+y^2<(5*w+43*resolution)^2)
      unit = fC
      descr = Charge within 5w+86 um
    int47: IntSurface "Surface Integration 47" on selection geom1_boxsel1
      expr = -4*esbe.nD*(x^2+y^2<(5*w+44*resolution)^2)
      unit = fC
      descr = Charge within 5w+88 um
    int48: IntSurface "Surface Integration 48" on selection geom1_boxsel1
      expr = -4*esbe.nD*(x^2+y^2<(5*w+45*resolution)^2)
      unit = fC
      descr = Charge within 5w+90 um
    int49: IntSurface "Surface Integration 49" on selection geom1_boxsel1
      expr = -4*esbe.nD*(x^2+y^2<(5*w+46*resolution)^2)
      unit = fC
      descr = Charge within 5w+92 um
    int50: IntSurface "Surface Integration 50" on selection geom1_boxsel1
      expr = -4*esbe.nD*(x^2+y^2<(5*w+47*resolution)^2)
      unit = fC
      descr = Charge within 5w+94 um
    int51: IntSurface "Surface Integration 51" on selection geom1_boxsel1
      expr = -4*esbe.nD*(x^2+y^2<(5*w+48*resolution)^2)
      unit = fC
      descr = Charge within 5w+96 um
    int52: IntSurface "Surface Integration 52" on selection geom1_boxsel1
      expr = -4*esbe.nD*(x^2+y^2<(5*w+49*resolution)^2)
      unit = fC
      descr = Charge within 5w+98 um
    int53: IntSurface "Surface Integration 53" on selection geom1_boxsel1
      expr = -4*esbe.nD*(x^2+y^2<(5*w+50*resolution)^2)
      unit = fC
      descr = Charge within 5w+100 um
    int54: IntSurface "Surface Integration 54" on selection geom1_boxsel1
      expr = -4*esbe.nD*(x^2+y^2<(5*w+51*resolution)^2)
      unit = fC
      descr = Charge within 5w+102 um
    int55: IntSurface "Surface Integration 55" on selection geom1_boxsel1
      expr = -4*esbe.nD*(x^2+y^2<(5*w+52*resolution)^2)
      unit = fC
      descr = Charge within 5w+104 um
    int56: IntSurface "Surface Integration 56" on selection geom1_boxsel1
      expr = -4*esbe.nD*(x^2+y^2<(5*w+53*resolution)^2)
      unit = fC
      descr = Charge within 5w+106 um
    int57: IntSurface "Surface Integration 57" on selection geom1_boxsel1
      expr = -4*esbe.nD*(x^2+y^2<(5*w+54*resolution)^2)
      unit = fC
      descr = Charge within 5w+108 um
    int58: IntSurface "Surface Integration 58" on selection geom1_boxsel1
      expr = -4*esbe.nD*(x^2+y^2<(5*w+55*resolution)^2)
      unit = fC
      descr = Charge within 5w+110 um
    int59: IntSurface "Surface Integration 59" on selection geom1_boxsel1
      expr = -4*esbe.nD*(x^2+y^2<(5*w+56*resolution)^2)
      unit = fC
      descr = Charge within 5w+112 um
    int60: IntSurface "Surface Integration 60" on selection geom1_boxsel1
      expr = -4*esbe.nD*(x^2+y^2<(5*w+57*resolution)^2)
      unit = fC
      descr = Charge within 5w+114 um
    int61: IntSurface "Surface Integration 61" on selection geom1_boxsel1
      expr = -4*esbe.nD*(x^2+y^2<(5*w+58*resolution)^2)
      unit = fC
      descr = Charge within 5w+116 um
    int62: IntSurface "Surface Integration 62" on selection geom1_boxsel1
      expr = -4*esbe.nD*(x^2+y^2<(5*w+59*resolution)^2)
      unit = fC
      descr = Charge within 5w+118 um
    int63: IntSurface "Surface Integration 63" on selection geom1_boxsel1
      expr = -4*esbe.nD*(x^2+y^2<(5*w+60*resolution)^2)
      unit = fC
      descr = Charge within 5w+120 um
    int64: IntSurface "Surface Integration 64" on selection geom1_boxsel1
      expr = -4*esbe.nD*(x^2+y^2<(5*w+61*resolution)^2)
      unit = fC
      descr = Charge within 5w+122 um
    int65: IntSurface "Surface Integration 65" on selection geom1_boxsel1
      expr = -4*esbe.nD*(x^2+y^2<(5*w+62*resolution)^2)
      unit = fC
      descr = Charge within 5w+124 um
    int66: IntSurface "Surface Integration 66" on selection geom1_boxsel1
      expr = -4*esbe.nD*(x^2+y^2<(5*w+63*resolution)^2)
      unit = fC
      descr = Charge within 5w+126 um
    int67: IntSurface "Surface Integration 67" on selection geom1_boxsel1
      expr = -4*esbe.nD*(x^2+y^2<(5*w+64*resolution)^2)
      unit = fC
      descr = Charge within 5w+128 um
    int68: IntSurface "Surface Integration 68" on selection geom1_boxsel1
      expr = -4*esbe.nD*(x^2+y^2<(5*w+65*resolution)^2)
      unit = fC
      descr = Charge within 5w+130 um
    int69: IntSurface "Surface Integration 69" on selection geom1_boxsel1
      expr = -4*esbe.nD*(x^2+y^2<(5*w+66*resolution)^2)
      unit = fC
      descr = Charge within 5w+132 um
    int70: IntSurface "Surface Integration 70" on selection geom1_boxsel1
      expr = -4*esbe.nD*(x^2+y^2<(5*w+67*resolution)^2)
      unit = fC
      descr = Charge within 5w+134 um
    int71: IntSurface "Surface Integration 71" on selection geom1_boxsel1
      expr = -4*esbe.nD*(x^2+y^2<(5*w+68*resolution)^2)
      unit = fC
      descr = Charge within 5w+136 um
    int72: IntSurface "Surface Integration 72" on selection geom1_boxsel1
      expr = -4*esbe.nD*(x^2+y^2<(5*w+69*resolution)^2)
      unit = fC
      descr = Charge within 5w+138 um
    int73: IntSurface "Surface Integration 73" on selection geom1_boxsel1
      expr = -4*esbe.nD*(x^2+y^2<(5*w+70*resolution)^2)
      unit = fC
      descr = Charge within 5w+140 um
    int74: IntSurface "Surface Integration 74" on selection geom1_boxsel1
      expr = -4*esbe.nD*(x^2+y^2<(5*w+71*resolution)^2)
      unit = fC
      descr = Charge within 5w+142 um
    int75: IntSurface "Surface Integration 75" on selection geom1_boxsel1
      expr = -4*esbe.nD*(x^2+y^2<(5*w+72*resolution)^2)
      unit = fC
      descr = Charge within 5w+144 um
    int76: IntSurface "Surface Integration 76" on selection geom1_boxsel1
      expr = -4*esbe.nD*(x^2+y^2<(5*w+73*resolution)^2)
      unit = fC
      descr = Charge within 5w+146 um
    int77: IntSurface "Surface Integration 77" on selection geom1_boxsel1
      expr = -4*esbe.nD*(x^2+y^2<(5*w+74*resolution)^2)
      unit = fC
      descr = Charge within 5w+148 um
    int78: IntSurface "Surface Integration 78" on selection geom1_boxsel1
      expr = -4*esbe.nD*(x^2+y^2<(5*w+75*resolution)^2)
      unit = fC
      descr = Charge within 5w+150 um
    int79: IntSurface "Surface Integration 79" on selection geom1_boxsel1
      expr = -4*esbe.nD*(x^2+y^2<(5*w+76*resolution)^2)
      unit = fC
      descr = Charge within 5w+152 um
    int80: IntSurface "Surface Integration 80" on selection geom1_boxsel1
      expr = -4*esbe.nD*(x^2+y^2<(5*w+77*resolution)^2)
      unit = fC
      descr = Charge within 5w+154 um
    int81: IntSurface "Surface Integration 81" on selection geom1_boxsel1
      expr = -4*esbe.nD*(x^2+y^2<(5*w+78*resolution)^2)
      unit = fC
      descr = Charge within 5w+156 um
    int82: IntSurface "Surface Integration 82" on selection geom1_boxsel1
      expr = -4*esbe.nD*(x^2+y^2<(5*w+79*resolution)^2)
      unit = fC
      descr = Charge within 5w+158 um
    int83: IntSurface "Surface Integration 83" on selection geom1_boxsel1
      expr = -4*esbe.nD*(x^2+y^2<(5*w+80*resolution)^2)
      unit = fC
      descr = Charge within 5w+160 um
    int84: IntSurface "Surface Integration 84" on selection geom1_boxsel1
      expr = -4*esbe.nD*(x^2+y^2<(5*w+81*resolution)^2)
      unit = fC
      descr = Charge within 5w+162 um
    int85: IntSurface "Surface Integration 85" on selection geom1_boxsel1
      expr = -4*esbe.nD*(x^2+y^2<(5*w+82*resolution)^2)
      unit = fC
      descr = Charge within 5w+164 um
    int86: IntSurface "Surface Integration 86" on selection geom1_boxsel1
      expr = -4*esbe.nD*(x^2+y^2<(5*w+83*resolution)^2)
      unit = fC
      descr = Charge within 5w+166 um
    int87: IntSurface "Surface Integration 87" on selection geom1_boxsel1
      expr = -4*esbe.nD*(x^2+y^2<(5*w+84*resolution)^2)
      unit = fC
      descr = Charge within 5w+168 um
    int88: IntSurface "Surface Integration 88" on selection geom1_boxsel1
      expr = -4*esbe.nD*(x^2+y^2<(5*w+85*resolution)^2)
      unit = fC
      descr = Charge within 5w+170 um
    int89: IntSurface "Surface Integration 89" on selection geom1_boxsel1
      expr = -4*esbe.nD*(x^2+y^2<(5*w+86*resolution)^2)
      unit = fC
      descr = Charge within 5w+172 um
    int90: IntSurface "Surface Integration 90" on selection geom1_boxsel1
      expr = -4*esbe.nD*(x^2+y^2<(5*w+87*resolution)^2)
      unit = fC
      descr = Charge within 5w+174 um
    int91: IntSurface "Surface Integration 91" on selection geom1_boxsel1
      expr = -4*esbe.nD*(x^2+y^2<(5*w+88*resolution)^2)
      unit = fC
      descr = Charge within 5w+176 um
    int92: IntSurface "Surface Integration 92" on selection geom1_boxsel1
      expr = -4*esbe.nD*(x^2+y^2<(5*w+89*resolution)^2)
      unit = fC
      descr = Charge within 5w+178 um
    int93: IntSurface "Surface Integration 93" on selection geom1_boxsel1
      expr = -4*esbe.nD*(x^2+y^2<(5*w+90*resolution)^2)
      unit = fC
      descr = Charge within 5w+180 um
    int94: IntSurface "Surface Integration 94" on selection geom1_boxsel1
      expr = -4*esbe.nD*(x^2+y^2<(5*w+91*resolution)^2)
      unit = fC
      descr = Charge within 5w+182 um
    int95: IntSurface "Surface Integration 95" on selection geom1_boxsel1
      expr = -4*esbe.nD*(x^2+y^2<(5*w+92*resolution)^2)
      unit = fC
      descr = Charge within 5w+184 um
    int96: IntSurface "Surface Integration 96" on selection geom1_boxsel1
      expr = -4*esbe.nD*(x^2+y^2<(5*w+93*resolution)^2)
      unit = fC
      descr = Charge within 5w+186 um
    int97: IntSurface "Surface Integration 97" on selection geom1_boxsel1
      expr = -4*esbe.nD*(x^2+y^2<(5*w+94*resolution)^2)
      unit = fC
      descr = Charge within 5w+188 um
    int98: IntSurface "Surface Integration 98" on selection geom1_boxsel1
      expr = -4*esbe.nD*(x^2+y^2<(5*w+95*resolution)^2)
      unit = fC
      descr = Charge within 5w+190 um
    int99: IntSurface "Surface Integration 99" on selection geom1_boxsel1
      expr = -4*esbe.nD*(x^2+y^2<(5*w+96*resolution)^2)
      unit = fC
      descr = Charge within 5w+192 um
    int100: IntSurface "Surface Integration 100" on selection geom1_boxsel1
      expr = -4*esbe.nD*(x^2+y^2<(5*w+97*resolution)^2)
      unit = fC
      descr = Charge within 5w+194 um
    int101: IntSurface "Surface Integration 101" on selection geom1_boxsel1
      expr = -4*esbe.nD*(x^2+y^2<(5*w+98*resolution)^2)
      unit = fC
      descr = Charge within 5w+196 um
    int102: IntSurface "Surface Integration 102" on selection geom1_boxsel1
      expr = -4*esbe.nD*(x^2+y^2<(5*w+99*resolution)^2)
      unit = fC
      descr = Charge within 5w+198 um
    int103: IntSurface "Surface Integration 103" on selection geom1_boxsel1
      expr = -4*esbe.nD*(x^2+y^2<(5*w+100*resolution)^2)
      unit = fC
      descr = Charge within 5w+200 um
    int104: IntSurface "Surface Integration 104" on selection geom1_boxsel1
      expr = -4*esbe.nD*(x^2+y^2<(5*w+101*resolution)^2)
      unit = fC
      descr = Charge within 5w+202 um
    int105: IntSurface "Surface Integration 105" on selection geom1_boxsel1
      expr = -4*esbe.nD*(x^2+y^2<(5*w+102*resolution)^2)
      unit = fC
      descr = Charge within 5w+204 um
    int106: IntSurface "Surface Integration 106" on selection geom1_boxsel1
      expr = -4*esbe.nD*(x^2+y^2<(5*w+103*resolution)^2)
      unit = fC
      descr = Charge within 5w+206 um
    int107: IntSurface "Surface Integration 107" on selection geom1_boxsel1
      expr = -4*esbe.nD*(x^2+y^2<(5*w+104*resolution)^2)
      unit = fC
      descr = Charge within 5w+208 um
    int108: IntSurface "Surface Integration 108" on selection geom1_boxsel1
      expr = -4*esbe.nD*(x^2+y^2<(5*w+105*resolution)^2)
      unit = fC
      descr = Charge within 5w+210 um
    int109: IntSurface "Surface Integration 109" on selection geom1_boxsel1
      expr = -4*esbe.nD*(x^2+y^2<(5*w+106*resolution)^2)
      unit = fC
      descr = Charge within 5w+212 um
    int110: IntSurface "Surface Integration 110" on selection geom1_boxsel1
      expr = -4*esbe.nD*(x^2+y^2<(5*w+107*resolution)^2)
      unit = fC
      descr = Charge within 5w+214 um
    int111: IntSurface "Surface Integration 111" on selection geom1_boxsel1
      expr = -4*esbe.nD*(x^2+y^2<(5*w+108*resolution)^2)
      unit = fC
      descr = Charge within 5w+216 um
    int112: IntSurface "Surface Integration 112" on selection geom1_boxsel1
      expr = -4*esbe.nD*(x^2+y^2<(5*w+109*resolution)^2)
      unit = fC
      descr = Charge within 5w+218 um
    int113: IntSurface "Surface Integration 113" on selection geom1_boxsel1
      expr = -4*esbe.nD*(x^2+y^2<(5*w+110*resolution)^2)
      unit = fC
      descr = Charge within 5w+220 um
    int114: IntSurface "Surface Integration 114" on selection geom1_boxsel1
      expr = -4*esbe.nD*(x^2+y^2<(5*w+111*resolution)^2)
      unit = fC
      descr = Charge within 5w+222 um
    int115: IntSurface "Surface Integration 115" on selection geom1_boxsel1
      expr = -4*esbe.nD*(x^2+y^2<(5*w+112*resolution)^2)
      unit = fC
      descr = Charge within 5w+224 um
  eg2: EvaluationGroup "Capacitance coefficients 1" | data = dset1
    int1: IntSurface "C_electrode" on selection geom1_boxsel2 | expr = esbe.nD/1[V]; unit = fF; descr = C10
    int2: IntSurface "C_shield" on selection geom1_boxsel3 | expr = esbe.nD/1[V]; unit = fF; descr = C20
  eg3: EvaluationGroup "Capacitance coefficients 2" | data = dset1
    int1: IntSurface "C_mutal" on selection geom1_boxsel3 | expr = -esbe.nD/1[V]; unit = fF; descr = C12

Plots
  pg1: PlotGroup3D "Electric Potential" (disabled) | data = grid1
    slc1: Slice | expr = esbe.V; quickxmethod = coord
    iso1: Isosurface | expr = esbe.V
  pg2: PlotGroup2D "Sample charge density" | data = surf1
    con1: Contour | expr = esbe.nD; unit = nC/m^2; contourtype = filled
  pg3: PlotGroup1D "Charge distribution electrode" | data = cl1
    lngr1: LineGraph | expr = comp1.esbe.nD; unit = nC/m^2
  pg4: PlotGroup1D "Charge distribution sample" | data = cl2
    lngr1: LineGraph | expr = comp1.esbe.nD; unit = nC/m^2
  pg5: PlotGroup1D "Charge distribution shield" | data = cl3
    lngr1: LineGraph | expr = comp1.esbe.nD; unit = nC/m^2
  pg6: PlotGroup2D "Electric field" | data = cpl1
    con1: Contour | expr = esbe.V; contourtype = filled
    str1: Streamline
      expr = {esbe.Ex, esbe.Ez}
      pointtype = arrow
      arrowcount = 165
      arrowlength = logarithmic
      arrowscale = 3.75E-5
  pg7: PlotGroup2D "Sensitivity" | data = surf3
    con1: Contour | expr = -esbe.nD; unit = nC/m^2; contourtype = filled